# Бета - распределение
# 1. Функция плотности распределения
# x := 0, 0.01 .. 1
f(x, a, b) := Γ(a + b)*x^(a - 1)*(1 - x)^(b - 1)/(Γ(a)*Γ(b))
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# 2. Функция распределения
D(x, a, b) := integral(f(x, a, b), x = 0 .. x)
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# 3. Мат.ожидание
M(a, b) := a/(a + b)
M(40, 40) = 0.5
# 4. Дисперсия наработки
Di(a, b) := a*b/((a + b)^2*(a + b + 1))
Di(40, 40) = 0.00308642
# 5. Среднеквадратическое отклонение
σ(a, b) := sqrt(Di(a, b))
σ(40, 40) = 0.0555556
